// SBML level 2 version 4

model GranuleCellGeneration()

  // Compartments:
  compartment default = 1 volume;
  compartment c1 in default = 1 volume;

  // Species:
  substanceOnly species oEGL in c1 = 1;
  substanceOnly species iEGL in c1 = 1;
  substanceOnly species Exit in c1 = 1;
  substanceOnly species $s4 in c1 = 0;
  substanceOnly species $s5 in c1 = 0;
  substanceOnly species $alphaP in c1 = 0.025;
  substanceOnly species $alphaE in c1 = 0.025;
  substanceOnly species $epsilon in c1 = 0.2;

  // Reactions:
  re2: oEGL => iEGL; alphaP*epsilon*oEGL;
  re3: iEGL => Exit; alphaE*iEGL;
  re4: $s4 => oEGL; alphaP*(1 - epsilon)*oEGL;
  re5: $s5 => iEGL; alphaP*2*epsilon*oEGL;

  // Unit definitions:
  unit substance = mole;
  unit volume = litre;
  unit area = metre^2;
  unit length = metre;
  unit time = second;
end
