// SBML level 2 version 4

model GranuleCellGeneration()

  // Compartments:
  compartment default = 1 volume;
  compartment c1 in default = 1 volume;

  // Species:
  species iEGL in c1 = 1/c1;
  species Exit in c1 = 0;
  substanceOnly species $s4 in c1 = 0;
  substanceOnly species $s5 in c1 = 0;
  substanceOnly species oEGL in c1 = 1;

  // Parameters:
  aP = 0.08 substance;
  aE = 0.052 substance;
  e = 0.45 substance;
  f = 0 substance;

  // Reactions:
  N_N_type_increase_iEGL: $s5 => iEGL; 2*aP*e*oEGL; N_N_type_increase_iEGL is "N,N_type_increase iEGL";
  movement_of_neuron: iEGL => Exit; aE*iEGL;
  P_P_type: $s4 => oEGL; aP*(1 - e - f)*oEGL; P_P_type is "P,P_type";
  N_N_type_decrease_oEGL: oEGL => $s4; aP*e*oEGL; N_N_type_decrease_oEGL is "N,N_type_decrease oEGL";
  P_N_type_increase_iEGL: $s5 => iEGL; aP*f*oEGL; P_N_type_increase_iEGL is "P,N_type_increase iEGL";

  // Unit definitions:
  unit substance = mole;
  unit volume = litre;
  unit area = metre^2;
  unit length = metre;
  unit time = second;
end
